// SBML level 3 version 1

model Xu2003_Phosphoinositide_turnover()
  // model units - substance: substance, volume: volume, area: area

  // Compartments:
  compartment Extracellular = 0.2777778;
  compartment PM = 0.5555556 um2;
  compartment Cytosol = 1;
  compartment NM = 0.1111111 um2;
  compartment Nucleus = 0.1111111;

  // Species:
  species PIP2_PHGFP_PM in PM = 0;
  species PH_GFP_Cyt in Cytosol = 0;
  species PI_PM in PM = 142857;
  species $stim_PM in PM = 1;
  species IP3_PHGFP_Cyt in Cytosol = 0;
  species PIP2_PM in PM = 4000;
  species PIP_PM in PM = 2857;
  species DAG_PM in PM = 2000;
  species $hv_Cytosol in Cytosol = 0;
  species $IP3X_Cytosol in Cytosol = 0;
  species PLC_PM in PM = 100;
  species PLC_act_PM in PM = 0;
  species IP3_Cyt in Cytosol = 96.32;

  // Parameters:
  Ratebasal_PIPsyn_PIPSyn has s_1;
  kBasalSynPIP_PIPSyn = 0.0055 s_1;
  PIP_basal_PIPSyn = 2857 molecules_um_2;
  Ratestim_PIPsyn_PIPSyn has s_1;
  kStimSynPIP_PIPSyn = 0.019 s_1;
  tauPIPsyn_PIPSyn = 0.05 s;
  PIPsyndecay_PIPSyn = 1 s;
  signal_PLCact has dimensionless;
  tau0_PLCact = 0.05 second;
  stimdecay_PLCact = 1 second;
  kr_PIP2PH_PIP2_PH has s_1;
  kf_PIP2PH_PIP2_PH = 0.12 uM_1_s_1;
  KdPIP2PH_PIP2_PH = 2 uM;
  Rate_PIP2Synbasal_PIP2Syn has s_1;
  kBasalSynPIP2_PIP2Syn = 0.048 s_1;
  PIP2_basal_PIP2Syn = 4000 molecules_um_2;
  Rate_PIP2SynStim_PIP2Syn has s_1;
  kStimSynPIP2_PIP2Syn = 0.92 s_1;
  tauPIP2syn_PIP2Syn = 0.05 s;
  PIP2syndecay_PIP2Syn = 1 s;
  kr_IP3PH_IP3_PHGFP has s_1;
  kf_IP3PH_IP3_PHGFP = 10 uM_1_s_1;
  KdIP3PH_IP3_PHGFP = 2 uM;
  PIP2_hyd_k_PIP2hyd = 2.4 um2_molecules_1_s_1;
  PLCact_KfPLCact = 0.0005 um2_molecules_1_s_1;
  PLCact_krPLCact = 0.1 s_1;
  PIP2_PH_hyd_k_PIP2PHhyd = 0 um2_molecules_1_s_1;
  IP3deg_kIP3deg = 0.08 s_1;
  IP3deg_IP3_basal = 0.16 uM;
  KMOLE = 0.00166113 uM_um3_molecules_1;
  PIPSyn_I = 0 pA_um_2;
  PIP2_hyd_I = 0 pA_um_2;
  PLCact_I = 0 pA_um_2;
  PIP2_PH_hyd_I = 0 pA_um_2;
  PIP2_PH_I = 0 pA_um_2;
  PIP2Syn_I = 0 pA_um_2;

  // Assignment rules:
  Ratebasal_PIPsyn_PIPSyn := piecewise(0.581*kBasalSynPIP_PIPSyn*(-1 + exp((PIP_basal_PIPSyn + (-PIP_PM))*(1/PIP_basal_PIPSyn))), PIP_PM < PIP_basal_PIPSyn, 0);
  Ratestim_PIPsyn_PIPSyn := piecewise(kStimSynPIP_PIPSyn*exp(-((time + (-tauPIPsyn_PIPSyn))*(1/PIPsyndecay_PIPSyn))), time > tauPIPsyn_PIPSyn, 0);
  signal_PLCact := piecewise(exp(-((time + (-tau0_PLCact))*(1/stimdecay_PLCact))), time > tau0_PLCact, 0);
  kr_PIP2PH_PIP2_PH := kf_PIP2PH_PIP2_PH*KdPIP2PH_PIP2_PH;
  Rate_PIP2Synbasal_PIP2Syn := piecewise(0.581*kBasalSynPIP2_PIP2Syn*(-1 + exp((PIP2_basal_PIP2Syn + (-PIP2_PM))*(1/PIP2_basal_PIP2Syn))), PIP2_PM < PIP2_basal_PIP2Syn, 0);
  Rate_PIP2SynStim_PIP2Syn := piecewise(kStimSynPIP2_PIP2Syn*exp(-((time + (-tauPIP2syn_PIP2Syn))*(1/PIP2syndecay_PIP2Syn))), time > tauPIP2syn_PIP2Syn, 0);
  kr_IP3PH_IP3_PHGFP := kf_IP3PH_IP3_PHGFP*KdIP3PH_IP3_PHGFP;

  // Reactions:
  PIPSyn: PI_PM -> PIP_PM; (Ratebasal_PIPsyn_PIPSyn + Ratestim_PIPsyn_PIPSyn)*PI_PM*PM;
  PIP2_hyd: PIP2_PM -> DAG_PM + IP3_Cyt; PIP2_hyd_k_PIP2hyd*PIP2_PM*PLC_act_PM*PM;  // modifiers: PLC_act_PM
  PLCact: PLC_PM -> PLC_act_PM; (PLCact_KfPLCact*PLC_PM*stim_PM*signal_PLCact + (-(PLCact_krPLCact*PLC_act_PM)))*PM;  // modifiers: stim_PM
  PIP2_PH_hyd: PIP2_PHGFP_PM -> PH_GFP_Cyt + IP3_Cyt + DAG_PM; PIP2_PH_hyd_k_PIP2PHhyd*PLC_act_PM*PIP2_PHGFP_PM*PM;  // modifiers: PLC_act_PM
  PIP2_PH: PH_GFP_Cyt + PIP2_PM -> PIP2_PHGFP_PM; (kf_PIP2PH_PIP2_PH*0.00166113*PH_GFP_Cyt*PIP2_PM + (-(kr_PIP2PH_PIP2_PH*PIP2_PHGFP_PM)))*PM;
  IP3deg: IP3_Cyt -> ; IP3deg_kIP3deg*(0.00166113*IP3_Cyt + (-IP3deg_IP3_basal))*Cytosol*1*(1/KMOLE);
  PIP2Syn: PIP_PM -> PIP2_PM; (Rate_PIP2Synbasal_PIP2Syn + Rate_PIP2SynStim_PIP2Syn)*PIP_PM*PM;
  IP3_PHGFP: IP3_Cyt + PH_GFP_Cyt -> IP3_PHGFP_Cyt; (kf_IP3PH_IP3_PHGFP*0.00166113*IP3_Cyt*0.00166113*PH_GFP_Cyt + (-(kr_IP3PH_IP3_PHGFP*0.00166113*IP3_PHGFP_Cyt)))*Cytosol*1*(1/KMOLE); IP3_PHGFP is "IP3-PHGFP";

  // Unit definitions:
  unit molecules_um_2 = item / (1e-6 metre)^2;
  unit molecule_per_volume = item / (1e-6 metre)^3;
  unit um2 = (1e-6 metre)^2;
  unit uM_um3_molecules_1 = 1e-21 dimensionless * mole / item;
  unit s_1 = 1 / second;
  unit s = second;
  unit uM_1_s_1 = litre / (1e-6 mole * second);
  unit uM = 1e-6 mole / litre;
  unit pA_um_2 = dimensionless * ampere / metre^2;
  unit um2_molecules_1_s_1 = (1e-6 metre)^2 / (item * second);
  unit substance = item;
  unit volume = (1e-6 metre)^3;
  unit area = (1e-6 metre)^2;
  unit molecule = item;
  unit umol_um3_litre_1 = 1e-21 mole;
  unit molecules_um_2_s_1 = item / ((1e-6 metre)^2 * second);
  unit uM_s_1 = 1e-6 mole / (litre * second);
end
