// SBML level 3 version 1

function Constant_flux__irreversible(v)
  v;
end

function v_pump(S_V, k_pump, ATP, NA, Km_pump)
  S_V*k_pump*ATP*NA/(1 + ATP/Km_pump);
end

function function_1(S_V, gNA, F, RT_F, Na_e, Na, Vm)
  S_V*(gNA/F)*(RT_F*ln(Na_e/Na) - Vm);
end

function v_GLC_m(Tmax, GLC_c, Kt_GLC, GLC_i)
  Tmax*(GLC_c/(GLC_c + Kt_GLC) - GLC_i/(GLC_i + Kt_GLC));
end

function function_2(ATP, GLC_i, Kg, KI_ATP, nH, kHK_PFK)
  kHK_PFK*ATP*(GLC_i/(GLC_i + Kg))/(1 + (ATP/KI_ATP)^nH);
end

function v_PGK(kPGK, GAP, ADP, NAD, NADH)
  kPGK*GAP*ADP*(NAD/NADH);
end

function v_LAC_m(Tmax, LAC_i, Kt_LAC, LAC_c)
  Tmax*(LAC_i/(LAC_i + Kt_LAC) - LAC_c/(LAC_c + Kt_LAC));
end

function v_O2_m(PS_V, KO2, HbOP, O2_c, nh, O2_i)
  PS_V*(KO2*(HbOP/O2_c - 1)^(-1/nh) - O2_i);
end

function v_O2_c(F_in, V_cap, O2_a, O2_c)
  2*F_in/V_cap*(O2_a - O2_c);
end

function v_GLC_c(F_in, V_cap, GLC_a, GLC_c)
  2*F_in/V_cap*(GLC_a - GLC_c);
end

function v_LAC_c(F_in, V_cap, LAC_a, LAC_c)
  2*F_in/V_cap*(LAC_a - LAC_c);
end

function v_dHb_in(F_in, O2_a, O2_c)
  F_in*2*(O2_a - O2_c);
end

function v_dHb_out(F_out, dHb, V_v)
  F_out*dHb/V_v;
end

model Aubert2002()
  // model units - substance: substance, volume: volume

  // Compartments:
  compartment Tissue = 1;
  compartment Arteries = 1;
  compartment Capillaries = 1;
  compartment Venous_balloon = 0.0237;

  // Species:
  substanceOnly species Na in Tissue = 15; Na is "Na+";
  substanceOnly species $ATP_Tissue in Tissue;
  substanceOnly species $ADP_Tissue in Tissue;
  substanceOnly species GLC_Tissue in Tissue = 1.2;
  substanceOnly species GAP in Tissue = 0.0057;
  substanceOnly species $NAD_Tissue in Tissue; NAD_Tissue is "NAD+";
  substanceOnly species NADH in Tissue = 0.026;
  substanceOnly species PYR in Tissue = 0.16;
  substanceOnly species PEP in Tissue = 0.02;
  substanceOnly species LAC_Tissue in Tissue = 1;
  substanceOnly species PCr in Tissue = 5;
  substanceOnly species $Cr in Tissue;
  substanceOnly species O2_Tissue in Tissue = 0.0262;
  substanceOnly species $O2_Arteries in Arteries = 8.34;
  substanceOnly species $GLC_Arteries in Arteries = 4.8;
  substanceOnly species $LAC_Arteries in Arteries = 0.313;
  substanceOnly species GLC_Capillaries in Capillaries = 4.56;
  substanceOnly species LAC_Capillaries in Capillaries = 0.35;
  substanceOnly species O2_Capillaries in Capillaries = 7.01;
  substanceOnly species dHb in Capillaries = 0.063;

  // Parameters:
  var F_in;
  F0 = 0.012;
  is_rising = 1;
  is_maximum = 0;
  is_falling = 0;
  Initial_for_Venous_balloon = Venous_balloon;
  ATP = 2.2;
  var ADP;
  qAK = 0.92;
  A = 2.212;
  var NAD; NAD is "NAD+";
  N = 0.212;
  C = 10;
  var dAMP_dATP; dAMP_dATP is "dAMP/dATP";
  var AMP;
  Initial_for_maximum = maximum;
  Initial_for_t_on = t_on;
  Initial_for_F0 = F0;
  Initial_for_alpha_F_in = alpha_F_in;
  t_on = 5;
  t_end = 360;
  V_max_Mito = 0.05233;
  Km_Mito = 0.05; Km_Mito is "Km,Mito";
  KI_Mito = 183.3; KI_Mito is "KI,Mito";
  n_Mito = 0.1;
  K_O2_Mito = 0.001;
  Initial_for_O2c_bar = O2c_bar;
  Kg = 0.05;
  KI_ATP = 1; KI_ATP is "KI,ATP";
  nH = 4;
  kHK_PFK = 0.12; kHK_PFK is "kHK-PFK";
  kPGK = 42.6;
  kPK = 86.7;
  S_V = 90000; S_V is "S/V";
  k_pump = 2.9e-7;
  Km_pump = 0.5;
  parameter_29 = 3666; parameter_29 is "k+CK";
  parameter_30 = 20; parameter_30 is "k-CK";
  ATPases_v = 0.149;
  gNa = 0.0039;
  F = 96500;
  RT_F = 26.73; RT_F is "RT/F";
  Na_extracellular = 150;
  Vm = -70;
  Tmax_GLC = 0.0476; Tmax_GLC is "Tmax,GLC";
  Kt_GLC = 9; Kt_GLC is "Kt,GLC";
  parameter_24 = 2000; parameter_24 is "k+LDH";
  parameter_25 = 44.8; parameter_25 is "k-LDH";
  Tmax_LAC = 0.00628; Tmax_LAC is "Tmax,LAC";
  Kt_LAC = 0.5; Kt_LAC is "Kt,LAC";
  PS_V = 1.6; PS_V is "PS/V";
  KO2 = 0.0361;
  Hb_OP = 8.6; Hb_OP is "Hb*OP";
  nh = 2.73;
  V_cap = 0.0055;
  v_stim_constant = 0.23;
  Initial_for_t_end = t_end;
  vATPase = 0.149;
  v_Mito = 0.0192;
  alpha_F_in = 0.5;

  // Assignment rules:
  ATP_Tissue := ATP*Tissue;
  ADP_Tissue := ADP*Tissue;
  NAD_Tissue := NAD*Tissue;
  Cr := (C - PCr/Tissue)*Tissue;
  F_in := F0 + is_rising*slope_up + is_maximum*maximum + is_falling*slope_down;
  slope_up := Initial_for_maximum/Initial_for_t_on*time;
  maximum := Initial_for_F0*Initial_for_alpha_F_in;
  slope_down := maximum*(t_on + t_end - time)/t_on;
  F_out := F0*((Venous_balloon/Initial_for_Venous_balloon)^2 + (Venous_balloon/Initial_for_Venous_balloon)^(-0.5)*35*(1/Initial_for_Venous_balloon)*F_in)/(1 + F0*(Venous_balloon/Initial_for_Venous_balloon)^(-0.5)*35*(1/Initial_for_Venous_balloon));
  ADP := ATP/2*(-qAK + (qAK^2 + 4*qAK*(A/ATP - 1))^0.5);
  NAD := N - NADH/Tissue;
  dAMP_dATP := -1 + qAK/2 - 1/2*(qAK^2 + 4*qAK*(A/ATP - 1))^(1/2) + qAK*A/(ATP*(qAK^2 + 4*qAK*(A/ATP - 1))^(1/2));
  AMP := A - ATP - ADP;
  v_Mito_H3 := V_max_Mito*(PYR/Tissue/(Km_Mito + PYR/Tissue))*(1/(1 + (ATP/(ADP*KI_Mito))^n_Mito))*(O2_Tissue/Tissue/(K_O2_Mito + O2_Tissue/Tissue));
  rCBF := F_in/Initial_for_F0;
  rCMRO2 := mitochondrial_respiration/0.0192;
  rVv := Venous_balloon/Initial_for_Venous_balloon;
  O2c_bar := 2*(O2_Capillaries/Capillaries) - O2_Arteries/Arteries;
  ratioO2c_bar := O2c_bar/Initial_for_O2c_bar;

  // Rate rules:
  Venous_balloon' = F_in - F_out;
  ATP' = (-2*reaction_4 + Phosphoglycerate_kinase + Pyruvate_kinase - Na_K_pump + 15*mitochondrial_respiration + Creatine_Kinase - ATPases)*(1 - dAMP_dATP)^(-1);

  // Reactions:
  mitochondrial_respiration: PYR + NADH + 3 O2_Tissue => $ATP_Tissue; Tissue*Constant_flux__irreversible(v_Mito_H3);
  reaction_4: GLC_Tissue + $ATP_Tissue => 2 GAP + $ADP_Tissue; Tissue*function_2(ATP_Tissue/Tissue, GLC_Tissue/Tissue, Kg, KI_ATP, nH, kHK_PFK); reaction_4 is "Hexokinase-phosphofructokinase system";
  Phosphoglycerate_kinase: GAP + $NAD_Tissue => NADH + PEP; Tissue*v_PGK(kPGK, GAP/Tissue, ADP_Tissue/Tissue, NAD_Tissue/Tissue, NADH/Tissue);  // modifiers: ADP_Tissue
  Pyruvate_kinase: $ADP_Tissue + PEP => $ATP_Tissue + PYR; kPK*ADP_Tissue*(PEP/Tissue);
  Na_K_pump: 3 Na + $ATP_Tissue => $ADP_Tissue; Tissue*v_pump(S_V, k_pump, ATP_Tissue/Tissue, Na/Tissue, Km_pump); Na_K_pump is "Na/K - pump";
  Creatine_Kinase: PCr + $ADP_Tissue -> $Cr + $ATP_Tissue; Tissue*(parameter_29*(PCr/Tissue)*(ADP_Tissue/Tissue) - parameter_30*(Cr/Tissue)*(ATP_Tissue/Tissue));
  ATPases: $ATP_Tissue => ; Tissue*Constant_flux__irreversible(ATPases_v);
  Sodium_leak: => Na; Tissue*function_1(S_V, gNa, F, RT_F, Na_extracellular, Na/Tissue, Vm);
  Blood_brain_transport_of_glucose: 100 GLC_Capillaries => GLC_Tissue; v_GLC_m(Tmax_GLC, GLC_Capillaries/Capillaries, Kt_GLC, GLC_Tissue/Tissue); Blood_brain_transport_of_glucose is "Blood-brain transport of glucose";
  Lactate_dehydrogenase: PYR + NADH -> LAC_Tissue + $NAD_Tissue; Tissue*(parameter_24*(PYR/Tissue)*(NADH/Tissue) - parameter_25*(LAC_Tissue/Tissue)*(NAD_Tissue/Tissue));
  Blood_brain_transport_of_lactate: LAC_Tissue => 100 LAC_Capillaries; v_LAC_m(Tmax_LAC, LAC_Tissue/Tissue, Kt_LAC, LAC_Capillaries/Capillaries); Blood_brain_transport_of_lactate is "Blood-brain transport of lactate";
  Blood_brain_transport_of_oxygen: 100 O2_Capillaries => O2_Tissue; v_O2_m(PS_V, KO2, Hb_OP, O2_Capillaries/Capillaries, nh, O2_Tissue/Tissue); Blood_brain_transport_of_oxygen is "Blood-brain transport of oxygen";
  reaction_11: $O2_Arteries => O2_Capillaries; v_O2_c(F_in, V_cap, O2_Arteries/Arteries, O2_Capillaries/Capillaries); reaction_11 is "Blood flow contribution to O2 variation";
  reaction_12: $GLC_Arteries => GLC_Capillaries; v_GLC_c(F_in, V_cap, GLC_Arteries/Arteries, GLC_Capillaries/Capillaries); reaction_12 is "Blood flow contribution to GLC_c variation";
  reaction_13: $LAC_Arteries => LAC_Capillaries; v_LAC_c(F_in, V_cap, LAC_Arteries/Arteries, LAC_Capillaries/Capillaries); reaction_13 is "Blood flow contribution to LAC_c variation";
  Na__inflow_after_stimulation: => Na; Tissue*Constant_flux__irreversible(v_stim_constant); Na__inflow_after_stimulation is "Na+ inflow after stimulation";
  inflow_of_dHb: => dHb; Capillaries*v_dHb_in(F_in, O2_Arteries/Arteries, O2_Capillaries/Capillaries);  // modifiers: O2_Arteries, O2_Capillaries
  outflow_of_dHb: dHb => ; Capillaries*v_dHb_out(F_out, dHb/Capillaries, Venous_balloon);

  // Events:
  from_increase_to_stable: at (time == Initial_for_t_on): is_maximum = 1, is_rising = 0;
  from_stable_to_decrease__end_of_stimulation: at (time == Initial_for_t_end): is_maximum = 0, is_falling = 1, v_stim_constant = 0; from_stable_to_decrease__end_of_stimulation is "from stable to decrease (end of stimulation)";
  from_decrease_to_at_rest: at (time == Initial_for_t_end + Initial_for_t_on): is_falling = 0;

  // Unit definitions:
  unit volume = 1e-3 litre;
  unit substance = 1e-3 mole;
end
